// SBML level 2 version 1
// This model was downloaded from BioModels Database
// http://www.ebi.ac.uk/biomodels-static/

function Mass_Action_1_1(k1, S1)
  k1*S1;
end

function Mass_Action_2_1(k1, S1, S2)
  k1*S1*S2;
end

function Mass_Action_0_1(k1)
  k1;
end

model Aguda1999_CellCycle()
  // The model reproduces the time profiles of p27, E2F and aE/cdk2 as depicted in Figure 5 c of the paper. Model was simulated on MathSBML.
  // To the extent possible under law, all copyright and related or neighbouring rights to this encoded model have been dedicated to the public domain worldwide. Please refer to CC0 Public Domain Dedication for more information.
  // In summary, you are entitled to use this encoded model in absolutely any manner you deem suitable, verbatim, or with modification, alone or embedded it in a larger context, redistribute it, commercially or not, in a restricted way or not.
  // To cite BioModels Database, please use: Li C, Donizelli M, Rodriguez N, Dharuri H, Endler L, Chelliah V, Li L, He E, Henry A, Stefan MI, Snoep JL, Hucka M, Le Novère N, Laibe C (2010) BioModels Database: An enhanced, curated and annotated resource for published quantitative kinetic models. BMC Syst Biol., 4:92.
  // biomodels.db:MODEL3897395081
  // biomodels.db:BIOMD0000000169
  // isDescribedBy pubmed:10619492
  // isPartOf reactome:REACT_1538.1
  // isVersionOf GO:0031575
  // hasTaxon taxonomy:40674

  // Compartments:
  compartment cell_1 = 1;

  // Species:
  substanceOnly species Y3_1 in cell_1 = 1.95; Y3_1 is "pRB_E2F";  // hasPart interpro:IPR015652 interpro:IPR015633
  substanceOnly species Y4_1 in cell_1 = 0; Y4_1 is "E2F";  // isVersionOf interpro:IPR015633
  substanceOnly species Y11_1 in cell_1 = 0.01; Y11_1 is "pRB_P";  // isVersionOf kegg.compound:C00562; isVersionOf interpro:IPR015652
  substanceOnly species Y2_1 in cell_1 = 0.01; Y2_1 is "i_cyclinE_CDK2";  // hasVersion uniprot:O96020 uniprot:P24941; isVersionOf uniprot:P24864 uniprot:P24941
  substanceOnly species Y1_1 in cell_1 = 0; Y1_1 is "a_cyclinE_CDK2";  // hasVersion uniprot:P24941 uniprot:O96020; hasVersion uniprot:P24864 uniprot:P24941
  substanceOnly species Y5_1 in cell_1 = 0.05; Y5_1 is "pRB";  // isVersionOf interpro:IPR015652
  substanceOnly species Y6_1 in cell_1 = 0; Y6_1 is "CycD_CDK4";  // hasVersion uniprot:P11802 interpro:IPR015451
  substanceOnly species Y7_1 in cell_1 = 15; Y7_1 is "p27";  // isHomologTo uniprot:P46527
  substanceOnly species Y8_1 in cell_1 = 1; Y8_1 is "cycE_CDK2_p27";  // hasVersion uniprot:P24864 uniprot:P24941 uniprot:P46527; hasVersion uniprot:O96020 uniprot:P24941 uniprot:P46527
  substanceOnly species Y10_1 in cell_1 = 5; Y10_1 is "p16";  // isHomologTo uniprot:P42771
  substanceOnly species Y9_1 in cell_1 = 0; Y9_1 is "cycD_CDK4_p27";  // hasVersion uniprot:P46527 uniprot:P11802 interpro:IPR015451

  // Parameters:
  k1p_1 = 0.5;
  k1pp_1 = 0.5;
  k1_1 = 0.1;
  k2_1 = 0.1;
  kminus2_1 = 1;
  k3_1 = 1.42;
  k3p_1 = 0;
  k4_1 = 1e-6;
  kminus4_1 = 0.016;
  kminus1_1 = 0.001;
  k5_1 = 0.02;
  k6_1 = 0.018;
  kminus6_1 = 5;
  k7_1 = 1e-5;
  k8_1 = 2;
  k9_1 = 2;
  K10_1 = 0.035;
  k17_1 = 3.5;
  k18_1 = 1e-5;
  k19_1 = 0.05;
  k20_1 = 0.01;
  k21_1 = 0.1;
  k22_1 = 0.001;
  k23_1 = 0.2;
  k24_1 = 0.1;
  k25_1 = 0.01;
  k25p_1 = 0.02;
  k26_1 = 0.01;
  k26p_1 = 0.1;
  k27_1 = 0.01;
  k28_1 = 0.01;
  k29_1 = 0.001;

  // Reactions:
  _1: Y3_1 => Y4_1 + Y11_1; k1p_1*Y6_1*Y3_1 + k1pp_1*Y9_1*Y3_1 + k1_1*Y1_1*Y3_1; _1 is "pRB/E2F complex deassociation";  // modifiers: Y1_1, Y6_1, Y9_1
  pRBE2Fcomplexformation_1: Y5_1 + Y4_1 => Y3_1; Mass_Action_2_1(kminus1_1, Y5_1, Y4_1); pRBE2Fcomplexformation_1 is "pRB/E2F complex formation";
  cycECDK2activation_1: Y2_1 => Y1_1; k2_1*Y1_1*Y2_1; cycECDK2activation_1 is "cycE/CDK2 activation";
  cycECDK2deactivation_1: Y1_1 => Y2_1; kminus2_1*Y1_1; cycECDK2deactivation_1 is "cycE/CDK2 deactivation";
  cycECDK2synthesis_1: => Y2_1; k3_1*Y4_1 + k3p_1; cycECDK2synthesis_1 is "icycE/CDK2 synthesis";  // modifiers: Y4_1
  E2Fsynthesis_1: => Y4_1; k4_1; E2Fsynthesis_1 is "E2F synthesis";
  E2Fdegradation_1: Y4_1 => ; Mass_Action_1_1(kminus4_1, Y4_1); E2Fdegradation_1 is "E2F degradation";
  cycECDK2degradation_1: Y2_1 => ; Mass_Action_1_1(k5_1, Y2_1); cycECDK2degradation_1 is "icycE/CDK2 degradation";
  cycDCDK4synthesis_1: => Y6_1; Mass_Action_0_1(k6_1); cycDCDK4synthesis_1 is "cycD/CDK4 synthesis";
  cycDCDK4degradation_1: Y6_1 => ; Mass_Action_1_1(kminus6_1, Y6_1); cycDCDK4degradation_1 is "cycD/CDK4 degradation";
  p27synthesis_1: => Y7_1; Mass_Action_0_1(k7_1); p27synthesis_1 is "p27 synthesis";
  p27degradationviacycECDK2_1: Y7_1 => ; k8_1*Y7_1*Y1_1; p27degradationviacycECDK2_1 is "p27 degradation via cycE/CDK2";  // modifiers: Y1_1
  cycECDK2p27complexformation_1: Y1_1 + Y7_1 => Y8_1; Mass_Action_2_1(k9_1, Y1_1, Y7_1); cycECDK2p27complexformation_1 is "cycE/CDK2/p27 complex formation";
  cycECDK2p27deassociation_1: Y8_1 => Y1_1 + Y7_1; Mass_Action_1_1(K10_1, Y8_1); cycECDK2p27deassociation_1 is "cycE/CDK2/p27 deassociation";
  cycDCDK4p16complexformation_1: Y6_1 + Y10_1 => ; Mass_Action_2_1(k17_1, Y6_1, Y10_1); cycDCDK4p16complexformation_1 is "cycD/CDK4/p16 complex formation";
  E2Fautostimulation_1: => Y4_1; k18_1*Y4_1; E2Fautostimulation_1 is "E2F auto stimulation";
  cycDCDK4p27complexformation_1: Y7_1 + Y6_1 => Y9_1; Mass_Action_2_1(k19_1, Y7_1, Y6_1); cycDCDK4p27complexformation_1 is "cycD/CDK4/p27 complex formation";
  cycDCDK4p27complexdeassociation_1: Y9_1 => Y7_1 + Y6_1; Mass_Action_1_1(k20_1, Y9_1); cycDCDK4p27complexdeassociation_1 is "cycD/CDK4/p27 complex deassociation";
  acycECDK2degradation_1: Y1_1 => ; k21_1*Y1_1*Y1_1; acycECDK2degradation_1 is "acycE/CDK2 degradation";
  p27degradation_1: Y7_1 => ; Mass_Action_1_1(k22_1, Y7_1); p27degradation_1 is "p27 degradation";
  _20: => Y10_1; Mass_Action_0_1(k23_1); _20 is "p16 synthesis";
  p16degradation_1: Y10_1 => ; Mass_Action_1_1(k24_1, Y10_1); p16degradation_1 is "p16 degradation";
  p16synthesisinhibitedbypRB_1: => Y10_1; k25_1/(1 + k25p_1*Y5_1); p16synthesisinhibitedbypRB_1 is "p16 synthesis inhibited by pRB";  // modifiers: Y5_1
  pRBpdephosphorilation_1: => Y5_1; k26_1/(1 + k26p_1*Y10_1); pRBpdephosphorilation_1 is "pRB synthesis inhibited by p16";  // modifiers: Y10_1
  pRBsynthesis_1: => Y5_1; Mass_Action_0_1(k27_1); pRBsynthesis_1 is "pRB synthesis";
  pRBdegradation_1: Y5_1 => ; Mass_Action_1_1(k28_1, Y5_1); pRBdegradation_1 is "pRB degradation";
  pRBpdephosphorylation_1: Y11_1 => Y5_1; Mass_Action_1_1(k29_1, Y11_1); pRBpdephosphorylation_1 is "pRB-p dephosphorylation";
end
